PCLK2 := 72*10^6  # Hz
ADCClockPrescaler := 2
ADCCycle := 3
ADCBit := 12
Vref := 3.3
ADCTottalConvTime := ADCCycle + ADCBit
ADCRes := Vref/2^ADCBit = 0.000805664  # V
fADC := PCLK2/ADCClockPrescaler = 36000000  # Hz
ADCt := 1/fADC = 2.77778e-8  # s
ADCConvTime := ADCt*ADCTottalConvTime = 4.16667e-7  # s
1/PCLK2 = 1.38889e-8  # s
ADCSampleRate := 1/ADCConvTime = 2400000  # Hz
InjectionTriggerConvTime := 3*ADCt = 8.33333e-8  # s
RegularTriggerConvTime := 2*ADCt = 5.55556e-8  # s
MaxExtTriggerFreq := 17*fADC = 612000000  # Hz
MaxExtTriggerPer := 17*ADCt = 4.72222e-7  # s
TripleModeConvTime := ADCConvTime/3 = 1.38889e-7  # s
TripleModeConvFreq := 1/TripleModeConvTime = 7200000  # Hz
400/1440000000 = 2.77778e-7
187.38791190 - 158.55911240 = 28.8288
